// COMSOL Multiphysics 6.0.0.354 model "MT2010_nosolutions.mph"
// Outline of the model tree

Parameters
  E = 1 [kV/cm]  // electric field
  tpulse = 1 [ms]  // pulse length
  trise = 10 [us]  // rise time
  tfall = 10 [us]  // fall time
  a = 30*Rc  // box
  U = E*a  // voltage
  Rc = 8.55 [um]  // cell radius
  sigma_e = 1.58 [S/m]  // Conductiv extracell
  epsilon_e = 72  // permitt extracell
  sigma_i = 0.3[S/m]  // Conductiv intracell
  epsilon_i = 72  // permitt intracell
  sigma_m = conductance_m*dm  // Conductiv membrane
  conductance_m = 1.9 [S/m^2]
  epsilon_m = capacitance_m/eps0*dm  // permitt membrane
  capacitance_m = 0.0089 [F/m^2]
  dm = 5[nm]  // membrane thickness
  K0 = 2e-2
  dVp = 9e-27[m^3]
  n = 0.12
  epsw = 80
  epsl = 2
  phi_im1 = 0.13[V]
  phi_im2 = 0.084[V]
  k_1 = 1e7[1/s]
  k_2 = 2000[1/s]
  k_3 = 2[1/s]
  kf = 0.044[1/s]
  ks = 0.003[1/s]
  D0 = 4.77e-10[m^2/s]
  Dp = D0/5
  Dr = D0/10000
  B = 0.63
  eps0 = 8.854187817e-12[F/m]
  T = 293 [K]
  kb = 1.38065e-23[J/K]
  F = 96485.3415[A*s/mol]
  R = 8.31[J/(mol*K)]
  NA = 6.022e23 [1/mol]
  Cextra = 1 [mM]  // extracellular concentration
  Cintra = 0 [mM]

Functions
  an1: Analytic | funcname = rectangular; expr = flc1hs(t-0.5*trise,0.5*trise) - flc1hs(t-tpulse+0.5*tfall,0.5*tfall); args = t; argunit = s
  wv1: Wave "Waveform 1" (disabled) | funcname = sinusiodal; period = tpulse
  wv2: Wave "Waveform 2" (disabled) | funcname = triangular; type = triangle; smooth = 1e-6; ncontder = 1; period = tpulse
  wv3: Wave "Waveform 3" (disabled) | funcname = bipolar; type = square; smooth = 1e-6; ncontder = 1; period = tpulse
  an2: Analytic (disabled) | funcname = mod10; expr = 0.95*(flc1hs(t-1e-6,1e-6) - flc1hs(t-tpulse+1e-6,1e-6)) + 0.05*sin(2*pi*5e4*t); args = t; argunit = s
  an3: Analytic (disabled) | funcname = mod90; expr = 0.55*(flc1hs(t-1e-6,1e-6) - flc1hs(t-tpulse+1e-6,1e-6)) + 0.45*sin(2*pi*5e4*t); args = t; argunit = s

Variables
  var1 "Main variables" on selection sel1
    ITV = V-V2
    kp = K0*k_3*exp(dVp*eps0*(epsw-epsl)/(2*kb*T*dm^2)*ITV^2)
    alpha_p1 = 1-R*T/(F*phi_im1)
    alpha_p2 = 1-R*T/(F*phi_im2)
    sigma_p10 = 0.5*(sigma_e+sigma_i)*exp(-phi_im1*F/(R*T))
    sigma_p20 = 0.5*(sigma_e+sigma_i)*exp(-phi_im2*F/(R*T))
    sigma_p1 = sigma_p10*exp(alpha_p1*n*abs(ITV)*F/(R*T))
    sigma_p2 = sigma_p20*exp(alpha_p2*n*abs(ITV)*F/(R*T))
    sigma_ep = sigma_m+sigma_p1*P1+sigma_p2*P2
    M = P2e*(B*exp(-kf*(t-tpulse))+(1-B)*exp(-ks*(t-tpulse)))
    Dm = P2*Dp+M*Dr
    Pm = Dm/dm
  var2 "Integration variables" on selection sel1
    sigma_ep_ave = aveop1(sigma_ep)
    Pm_ave = aveop1(Pm)
    P1_frac = aveop1(P1)
    P2_frac = aveop1(P2)
    c_avg = aveop2(c)
  var4 "Influx"
    influx = intop1(-influx_line)

Selections
  sel1: Explicit "Membrane" on boundaries 8, 9

Couplings
  aveop1: Average on selection sel1 | axisym = on
  aveop2: Average on domains 2 | axisym = on

Geometry
  geom1 "Geometry 1" (2D axisymmetric, length unit m)
    r1: Rectangle | pos = {0, -0.5*a}; size = {0.5*a, a}
    c1: Circle | rot = -90; r = Rc; angle = 180
    fin: Finalize "Form Union"

Materials
  mat1: Common "Material 1" on domains 1
    def "Basic"
      electricconductivity = sigma_e
      relpermittivity = epsilon_e
  mat2: Common "Material 2" on domains 2
    def "Basic"
      electricconductivity = sigma_i
      relpermittivity = epsilon_i
  mat3: Common "Material 3" on selection sel1
    def "Basic"
      electricconductivity = sigma_ep
      relpermittivity = epsilon_m

Physics
  ec: ConductiveMedia "Electric Currents" on domains 1
    dependent variable V
    ShapeProperty.frame = material
    PortSweepSettings.PortParamName = PortName
    cucn1: CurrentConservation (default)
      minput_electricfield_src = root.mod1.ec.Er
      materialType = solid
      minput_numberdensity = 0
    axi1: AxialSymmetry (default)
    ein1: ElectricInsulation (default)
    init1: init "Initial Values 1" (default)
    pot1: ElectricPotential on boundaries 2 | V0 = U*rectangular(t)
    gnd1: Ground on boundaries 6
    dimp1: DistributedImpedance on selection sel1 | Vref = V2; ds = dm; rhos = 1e-8
  ec2: ConductiveMedia "Electric Currents 2" on domains 2
    dependent variable V2
    ShapeProperty.frame = material
    PortSweepSettings.PortParamName = PortName
    cucn1: CurrentConservation (default)
      minput_electricfield_src = root.mod1.ec2.Er
      materialType = solid
      minput_numberdensity = 0
    axi1: AxialSymmetry (default)
    ein1: ElectricInsulation (default)
    init1: init "Initial Values 1" (default)
    dimp1: DistributedImpedance on selection sel1 | Vref = V; ds = dm; rhos = 1e-8
  bode: BoundaryODE "Distributed ODEs and DAEs" on selection sel1
    dependent variable C
    Units.CustomSourceTermUnit = 1/s
    dode1: DistributedODE (default) | f = -kp*C + k_1*C1; da = 1
    init1: init "Initial Values 1" (default) | C = 1
  bode2: BoundaryODE "Distributed ODEs and DAEs 2" on selection sel1
    dependent variable C1
    Units.CustomSourceTermUnit = 1/s
    dode1: DistributedODE (default) | f = -kp*(C1-C) - k_1*C1 + k_2*P1; da = 1
    init1: init "Initial Values 1" (default)
  bode3: BoundaryODE "Distributed ODEs and DAEs 3" on selection sel1
    dependent variable P1
    Units.CustomSourceTermUnit = 1/s
    dode1: DistributedODE (default) | f = -kp*(P1-C1) - k_2*P1 + k_3*P2; da = 1
    init1: init "Initial Values 1" (default)
  bode4: BoundaryODE "Distributed ODEs and DAEs 4" on selection sel1
    dependent variable P2
    Units.CustomSourceTermUnit = 1/s
    dode1: DistributedODE (default) | f = kp*P1 - k_3*P2; da = 1
    init1: init "Initial Values 1" (default)
  bode5: BoundaryODE "Distributed ODEs and DAEs 5" on selection sel1
    dependent variable P2e
    Units.CustomSourceTermUnit = 1/s
    dode1: DistributedODE (default) | f = kp*P1*(t<tpulse); da = 1
    init1: init "Initial Values 1" (default)
  chds: DilutedSpecies "Transport of Diluted Species" on domains 1, 2
    dependent variable c
    ShapeProperty.order_concentration = 2
    ShapeProperty.valueType = complex
    ShapeProperty.boundaryFlux_concentration = 0
    MassConsistentStabilization.CrosswindType = Codina
    AdvancedSettings.BackCompState = 0
    TransportMechanism.Convection = 0
    cdm1: ConvectionDiffusionMigration "Diffusion" (default) | MobilityModel = UserDefined; D_c = D0
    axi1: AxialSymmetry (default)
    nflx1: NoFlux (default) | IncludeConvection = 1
    init1: init "Initial Values 1" (default) | initc = Cextra
    init2: init "Initial Values 2" on domains 2
    tdb1: ThinDiffusionBarrier on selection sel1 | Ds = Dm; ds = dm

Mesh
  mesh1 "Mesh 1"
    size: MeshSizeDefault | hauto = 4
    ftri1: FreeTri "Free Triangular 1" on remaining entities
      size1: Size on selection sel1 | hmax = 3e-7; hgrad = 1.5; custom = on

Studies
  std1 "Study 1"
    param: Parametric "Parametric Sweep"
      sweeptype = filled
      pname = {tpulse, E}
      plistarr = {"0.1,1", 0 0.4 0.6 0.8 1 1.2 1.4 1.6 1.8 2}
      punit = {ms, kV/cm}
    time: Transient "Time Dependent"
      tlist = 10^{range(-8,(log10(tpulse[1/s])+8)/200,log10(tpulse[1/s]))} tpulse+10^{range(-8,(log10(1e-4)+8)/50,log10(1e-4))} tpulse+10^{range(log10(1e-4),(log10(2e2)-log10(1e-4))/350, log10(2e2))}
      usertol = on
      rtol = 0.0001

Solver configurations
  sol1 "Solution 1" (study std1)
    v1: Variables "Dependent Variables 1"
    t1: Time "Time-Dependent Solver 1"
      tlist = 10^{range(-8,(log10(tpulse[1/s])+8)/200,log10(tpulse[1/s]))} tpulse+10^{range(-8,(log10(1e-4)+8)/50,log10(1e-4))} tpulse+10^{range(log10(1e-4),(log10(2e2)-log10(1e-4))/350, log10(2e2))}
      rtol = 0.0001
      tstepsbdf = strict
      maxorder = 2
      stabcntrl = on
      fc1: FullyCoupled | maxiter = 8; damp = 0.9; jtech = once; stabacc = aacc; aaccdim = 5; aaccmix = 0.9
      d1: Direct
  sol2 "Parametric Solutions 1" (study std1)

Datasets
  dset1: Solution | solution = sol1
  dset2: Solution | solution = sol2

Plots
  pg1: PlotGroup1D "1D Plot Group 1" | data = dset2
    ptgr1: PointGraph on points 2 | data = dset2; expr = c_avg; unit = mM; xdata = expr; xdataexpr = E
    ptgr2: PointGraph on points 2 | data = dset2; expr = c_avg; unit = mM; xdata = expr; xdataexpr = E